// SBML level 3 version 1

model egfr_erk_base()
  // EGFR_ERK_GRB2_WT

  // Compartments:
  compartment cyto = 1;

  // Species:
  species EGF_ext in cyto = 1;
  species EGFR in cyto = 1;
  species EGFR_active in cyto = 0;
  species GRB2 in cyto = 1;
  species Complex in cyto = 0;
  species RAS in cyto = 0.5;
  species RAF in cyto = 0.5;
  species MEK in cyto = 0.5;
  species ERK in cyto = 0.5;
  species pERK in cyto = 0;

  // Parameters:
  k_act = 1 per_min;
  k_deact = 0.2 per_min;
  k_bind_grb2 = 0.8 per_min;
  k_release_grb2 = 0.2 per_min;
  k_ras = 0.5 per_min;
  k_raf = 0.4 per_min;
  k_mek = 0.3 per_min;
  k_erk = 0.3 per_min;
  k_perk_decay = 0.15 per_min;

  // Reactions:
  EGF_activation: EGF_ext + EGFR => EGFR_active; k_act*EGF_ext*EGFR;
  EGFR_deactivation: EGFR_active => EGFR; k_deact*EGFR_active;
  GRB2_binding: EGFR_active + GRB2 => Complex; k_bind_grb2*EGFR_active*GRB2;
  GRB2_release: Complex => EGFR_active + GRB2; k_release_grb2*Complex;
  RAS_activation: RAS => RAF; k_ras*Complex*RAS;
  RAF_activation: RAF => MEK; k_raf*RAF;
  MEK_activation: MEK => ERK; k_mek*MEK;
  ERK_activation: ERK => pERK; k_erk*ERK;
  pERK_decay: pERK => ERK; k_perk_decay*pERK;

  // Unit definitions:
  unit per_min = 1 / (60 second);
end
