// SBML level 3 version 1

model egfr_erk_grb2_ko()
  // EGFR_ERK_GRB2_KO

  // Compartments:
  compartment cyto = 1;

  // Species:
  species EGF_ext in cyto = 1;
  species EGFR in cyto = 1;
  species EGFR_active in cyto = 0;
  species GRB2 in cyto = 0;
  species Complex in cyto = 0;
  species RAS in cyto = 0.5;
  species RAF in cyto = 0.5;
  species MEK in cyto = 0.5;
  species ERK in cyto = 0.5;
  species pERK in cyto = 0;

  // Parameters:
  k_act = 1;
  k_deact = 0.2;
  k_bind_grb2 = 0;
  k_release_grb2 = 0;
  k_ras = 0.2;
  k_raf = 0.3;
  k_mek = 0.25;
  k_erk = 0.25;
  k_perk_decay = 0.15;

  // Reactions:
  EGF_activation: EGF_ext + EGFR -> EGFR_active; k_act*EGF_ext*EGFR;
  EGFR_deactivation: EGFR_active -> EGFR; k_deact*EGFR_active;
  RAS_activation: RAS -> RAF; k_ras*EGFR_active*RAS;
  RAF_activation: RAF -> MEK; k_raf*RAF;
  MEK_activation: MEK -> ERK; k_mek*MEK;
  ERK_activation: ERK -> pERK; k_erk*ERK;
  pERK_decay: pERK -> ERK; k_perk_decay*pERK;
end
